*Heading
** Job name: 800C_1s-1_step_19 Model name: Model-1
** Generated by: Abaqus/CAE 2022
*Preprint, echo=NO, model=NO, history=NO, contact=NO
**
** PARTS
**
*Part, name=Part-4
*End Part
**
*Part, name=Part-5
*Node
      1, 0.00650000013,           0.
      2,           0.,           0.
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*Element, type=CAX3T
1, 133, 132, 131
2, 162, 100, 136
3, 191, 164, 185
*Element, type=CAX4T
  4,  16,  15, 200, 201
  5,  22, 136, 100,  23
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*Node
    208,           0.,           0.,           0.
*Nset, nset=Part-5-RefPt_, internal
208,
*Nset, nset=_PickedSet6, internal, generate
   1,  207,    1
*Elset, elset=_PickedSet6, internal, generate
   1,  175,    1
** Section: platens
*Solid Section, elset=_PickedSet6, material=Al2O3
,
*End Part
**
*Part, name=Part-6
*Node
      1, 0.00650000013,           0.
      2,           0.,           0.
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*Element, type=CAX3T
1, 192, 190, 191
2, 208, 174, 171
3, 196, 194, 195
*Element, type=CAX4T
  4,  99, 100,  22,  21
  5,   1,  29, 200,   5
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*Node
    214, -5.98861269e-18, 0.0350000001,           0.
*Nset, nset=Part-6-RefPt_, internal
214,
*Nset, nset=_PickedSet8, internal, generate
   1,  213,    1
*Elset, elset=_PickedSet8, internal, generate
   1,  181,    1
** Section: platens
*Solid Section, elset=_PickedSet8, material=Al2O3
,
*End Part
**
*Part, name=Part-7
*Node
      1, 0.00650000013,           0.
      2,  0.009333333,           0.
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*Element, type=CAX4T
 1,  1,  2,  6,  5
 2,  2,  3,  7,  6
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*Nset, nset=_PickedSet4, internal, generate
  1,  20,   1
*Elset, elset=_PickedSet4, internal, generate
  1,  12,   1
** Section: machine_parts
*Solid Section, elset=_PickedSet4, material=H13
,
*End Part
**
*Part, name=Part-8
*Node
      1,           0.,  0.145249993
      2,           0., 0.00274999999
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*Element, type=CAX3T
1, 140, 222, 155
2, 199, 183, 178
3, 227, 147, 145
*Element, type=CAX4T
  4,  96,  56,   5, 126
  5, 109, 114,  61,  62
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*Nset, nset=_PickedSet21, internal, generate
   1,  227,    1
*Elset, elset=_PickedSet21, internal, generate
   1,  185,    1
** Section: machine_parts
*Solid Section, elset=_PickedSet21, material=H13
,
*End Part
**
*Part, name=Part-9
*Node
      1, 0.00650000013, -0.00675000018
      2, 0.0092000002, -0.00675000018
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*Element, type=CAX4T
 1,  1,  2,  8,  7
 2,  2,  3,  9,  8
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*Nset, nset=_PickedSet3, internal, generate
  1,  24,   1
*Elset, elset=_PickedSet3, internal, generate
  1,  15,   1
** Section: machine_parts
*Solid Section, elset=_PickedSet3, material=H13
,
*End Part
**
*Part, name=Part-10
*Node
      1,  0.100000001,           0.
      2,           0.,           0.
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*Element, type=CAX3T
1,  71,  72, 107
2,  63,  99,  65
3, 106,  55,  64
4,  72,  61, 107
*Element, type=CAX4T
 5,  72,  76,  84,  99
 6,  74,  82,  66, 103
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*Nset, nset=_PickedSet23, internal, generate
   1,  107,    1
*Elset, elset=_PickedSet23, internal, generate
  1,  88,   1
** Section: machine_parts
*Solid Section, elset=_PickedSet23, material=H13
,
*End Part
**
*Part, name=sample
*Node
      1,           0.,           0.
      2, 0.000250000012,           0.
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*Element, type=CAX4RT
  1,   1,   2,  13,  12
  2,   2,   3,  14,  13
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*Nset, nset=_PickedSet2, internal, generate
   1,  451,    1
*Elset, elset=_PickedSet2, internal, generate
   1,  400,    1
** Section: sample
*Solid Section, elset=_PickedSet2, controls=EC-1, material=material
,
*End Part
**
**
** ASSEMBLY
**
*Assembly, name=Assembly
**
*Instance, name=sample, part=sample
*End Instance
**
*Instance, name=Part-4-1, part=Part-4
*Node
      1,           0.,           0.,           0.
*Nset, nset=Part-4-1-RefPt_, internal
1,
*Surface, type=SEGMENTS, name=RigidSurface_, internal
START,           0.,           0.
 LINE,        0.005,           0.
*Rigid Body, ref node=Part-4-1-RefPt_, analytical surface=RigidSurface_
*End Instance
**
*Instance, name=Part-4-2, part=Part-4
          0.,         0.01,           0.
*Node
      1,           0.,           0.,           0.
*Nset, nset=Part-4-2-RefPt_, internal
1,
*Surface, type=SEGMENTS, name=RigidSurface_, internal
START,        0.005,           0.
 LINE,           0.,           0.
*Rigid Body, ref node=Part-4-2-RefPt_, analytical surface=RigidSurface_
*End Instance
**
*Instance, name=Part-6-2, part=Part-6
          0.,       -0.035,           0.
*End Instance
**
*Instance, name=Part-5-2, part=Part-5
          0.,         0.01,           0.
*End Instance
**
*Instance, name=Part-7-1, part=Part-7
          0.,        0.035,           0.
*End Instance
**
*Instance, name=Part-8-1, part=Part-8
          0.,      0.04225,           0.
*End Instance
**
*Instance, name=Part-9-1, part=Part-9
          0.,     -0.02825,           0.
*End Instance
**
*Instance, name=Part-10-1, part=Part-10
          0.,       -0.075,           0.
*End Instance
**
*Nset, nset=Set-12, instance=sample, generate
   1,  451,    1
*Nset, nset=Set-12, instance=Part-6-2, generate
   1,  213,    1
*Nset, nset=Set-12, instance=Part-7-1, generate
  1,  20,   1
*Nset, nset=Set-12, instance=Part-9-1, generate
  1,  24,   1
*Nset, nset=Set-12, instance=Part-5-2, generate
   1,  207,    1
*Nset, nset=Set-12, instance=Part-10-1, generate
   1,  107,    1
*Nset, nset=Set-12, instance=Part-8-1, generate
   1,  227,    1
*Elset, elset=Set-12, instance=sample, generate
   1,  400,    1
*Elset, elset=Set-12, instance=Part-6-2, generate
   1,  181,    1
*Elset, elset=Set-12, instance=Part-7-1, generate
  1,  12,   1
*Elset, elset=Set-12, instance=Part-9-1, generate
  1,  15,   1
*Elset, elset=Set-12, instance=Part-5-2, generate
   1,  175,    1
*Elset, elset=Set-12, instance=Part-10-1, generate
  1,  88,   1
*Elset, elset=Set-12, instance=Part-8-1, generate
   1,  185,    1
*Nset, nset=Volume, instance=sample, generate
   1,  451,    1
*Elset, elset=Volume, instance=sample, generate
   1,  400,    1
*Nset, nset=central_thermocouple, instance=sample
 231,
*Nset, nset=machine_bottom, instance=Part-4-1
 1,
*Nset, nset=machine_bottom, instance=Part-6-2, generate
   1,  213,    1
*Nset, nset=machine_bottom, instance=Part-9-1, generate
  1,  24,   1
*Nset, nset=machine_bottom, instance=Part-10-1, generate
   1,  107,    1
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*Nset, nset=machine_top, instance=Part-4-2
 1,
*Nset, nset=machine_top, instance=Part-5-2, generate
   1,  207,    1
*Nset, nset=machine_top, instance=Part-7-1, generate
  1,  20,   1
*Nset, nset=machine_top, instance=Part-8-1, generate
   1,  227,    1
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*Nset, nset=off_centre_thermocouple, instance=sample
 407,
*Nset, nset=platen_reference_point, instance=Part-4-2
 1,
*Nset, nset=sample_midline, instance=sample, generate
   1,  441,   11
*Elset, elset=sample_midline, instance=sample, generate
   1,  391,   10
*Nset, nset=sample_midpoint, instance=sample
 221,
*Nset, nset=sample_top, instance=sample, generate
 441,  451,    1
*Elset, elset=sample_top, instance=sample, generate
 391,  400,    1
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*Elset, elset=_sample_surface_S2, internal, instance=sample, generate
  10,  400,   10
*Surface, type=ELEMENT, name=sample_surface
_sample_surface_S2, S2
*Elset, elset=__PickedSurf36_S3, internal, instance=sample, generate
 391,  400,    1
*Surface, type=ELEMENT, name=_PickedSurf36, internal
__PickedSurf36_S3, S3
*Elset, elset=__PickedSurf38_S1, internal, instance=sample, generate
  1,  10,   1
*Surface, type=ELEMENT, name=_PickedSurf38, internal
__PickedSurf38_S1, S1
*Elset, elset=__PickedSurf40_S2, internal, instance=sample, generate
  10,  400,   10
*Surface, type=ELEMENT, name=_PickedSurf40, internal
__PickedSurf40_S2, S2
*Elset, elset=__PickedSurf42_S2, internal, instance=sample, generate
  10,  400,   10
*Surface, type=ELEMENT, name=_PickedSurf42, internal
__PickedSurf42_S2, S2
*Elset, elset=__PickedSurf78_S1, internal, instance=Part-5-2
  4,  6,  8, 10, 13, 14, 15, 39, 63
*Elset, elset=__PickedSurf78_S3, internal, instance=Part-5-2
  9, 12, 33, 34
*Surface, type=ELEMENT, name=_PickedSurf78, internal
__PickedSurf78_S1, S1
__PickedSurf78_S3, S3
*Elset, elset=__PickedSurf79_S3, internal, instance=sample, generate
 391,  400,    1
*Surface, type=ELEMENT, name=_PickedSurf79, internal
__PickedSurf79_S3, S3
*Elset, elset=__PickedSurf80_S2, internal, instance=Part-6-2
   6,  33,  35,  60,  99, 101
*Elset, elset=__PickedSurf80_S3, internal, instance=Part-6-2
 29,
*Elset, elset=__PickedSurf80_S4, internal, instance=Part-6-2
  34,  63,  64,  65, 106
*Elset, elset=__PickedSurf80_S1, internal, instance=Part-6-2
 37,
*Surface, type=ELEMENT, name=_PickedSurf80, internal
__PickedSurf80_S2, S2
__PickedSurf80_S3, S3
__PickedSurf80_S4, S4
__PickedSurf80_S1, S1
*Elset, elset=__PickedSurf81_S1, internal, instance=sample, generate
  1,  10,   1
*Surface, type=ELEMENT, name=_PickedSurf81, internal
__PickedSurf81_S1, S1
*Elset, elset=__PickedSurf94_S4, internal, instance=Part-7-1, generate
  1,  10,   3
*Surface, type=ELEMENT, name=_PickedSurf94, internal
__PickedSurf94_S4, S4
*Elset, elset=__PickedSurf95_S4, internal, instance=Part-5-2
  5, 17, 18, 22, 23, 24
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*Elset, elset=__PickedSurf95_S2, internal, instance=Part-5-2
  6, 36, 37, 61, 70, 75, 90
*Elset, elset=__PickedSurf95_S1, internal, instance=Part-5-2
 16,
*Surface, type=ELEMENT, name=_PickedSurf95, internal
__PickedSurf95_S4, S4
__PickedSurf95_S2, S2
__PickedSurf95_S1, S1
*Elset, elset=__PickedSurf96_S2, internal, instance=Part-5-2
 16,
*Elset, elset=__PickedSurf96_S3, internal, instance=Part-5-2
 38,
*Elset, elset=__PickedSurf96_S3, internal, instance=Part-7-1, generate
 10,  12,   1
*Surface, type=ELEMENT, name=_PickedSurf96, internal
__PickedSurf96_S2, S2
__PickedSurf96_S3, S3
*Elset, elset=__PickedSurf97_S1, internal, instance=Part-8-1
 34, 41, 87
*Elset, elset=__PickedSurf97_S4, internal, instance=Part-8-1
 35, 40, 82
*Elset, elset=__PickedSurf97_S2, internal, instance=Part-8-1
 37,
*Surface, type=ELEMENT, name=_PickedSurf97, internal
__PickedSurf97_S1, S1
__PickedSurf97_S4, S4
__PickedSurf97_S2, S2
*Elset, elset=__PickedSurf98_S4, internal, instance=Part-9-1, generate
  1,  11,   5
*Surface, type=ELEMENT, name=_PickedSurf98, internal
__PickedSurf98_S4, S4
*Elset, elset=__PickedSurf99_S3, internal, instance=Part-6-2
   4,   7,  19,  20,  21,  22,  23,  50, 172, 177
*Elset, elset=__PickedSurf99_S1, internal, instance=Part-6-2
  5,  6, 10, 12, 13, 14, 15, 16, 17, 59, 62, 97
*Elset, elset=__PickedSurf99_S4, internal, instance=Part-6-2
 173, 180
*Elset, elset=__PickedSurf99_S2, internal, instance=Part-6-2
 179,
*Surface, type=ELEMENT, name=_PickedSurf99, internal
__PickedSurf99_S3, S3
__PickedSurf99_S1, S1
__PickedSurf99_S4, S4
__PickedSurf99_S2, S2
*Elset, elset=__PickedSurf100_S4, internal, instance=Part-6-2
 5,
*Elset, elset=__PickedSurf100_S2, internal, instance=Part-6-2
 38,
*Elset, elset=__PickedSurf100_S1, internal, instance=Part-9-1, generate
 1,  5,  1
*Surface, type=ELEMENT, name=_PickedSurf100, internal
__PickedSurf100_S4, S4
__PickedSurf100_S2, S2
__PickedSurf100_S1, S1
*Elset, elset=__PickedSurf101_S1, internal, instance=Part-10-1
 15, 16, 18, 24, 25, 26, 27, 29, 30, 46
*Elset, elset=__PickedSurf101_S3, internal, instance=Part-10-1
 20, 21, 22, 23, 31, 32, 33, 61
*Surface, type=ELEMENT, name=_PickedSurf101, internal
__PickedSurf101_S1, S1
__PickedSurf101_S3, S3
*Elset, elset=__PickedSurf112_S2, internal, instance=sample, generate
  10,  400,   10
*Elset, elset=__PickedSurf112_S2, internal, instance=Part-6-2
   6,  33,  35,  60,  99, 101, 179
*Elset, elset=__PickedSurf112_S2, internal, instance=Part-7-1, generate
  3,  12,   3
*Elset, elset=__PickedSurf112_S2, internal, instance=Part-9-1, generate
  5,  15,   5
*Elset, elset=__PickedSurf112_S2, internal, instance=Part-5-2
  6, 36, 37, 61, 70, 75, 90
*Elset, elset=__PickedSurf112_S2, internal, instance=Part-10-1
  7, 70, 73, 76
*Elset, elset=__PickedSurf112_S2, internal, instance=Part-8-1
   4,   8,  23,  24,  39,  41
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*Elset, elset=__PickedSurf112_S3, internal, instance=Part-6-2
   4,   7,  19,  20,  21,  22,  23,  29,  50, 172, 177
*Elset, elset=__PickedSurf112_S3, internal, instance=Part-9-1, generate
 11,  15,   1
*Elset, elset=__PickedSurf112_S3, internal, instance=Part-5-2
  9, 12, 33, 34
*Elset, elset=__PickedSurf112_S3, internal, instance=Part-10-1
 20, 21, 22, 23, 31, 32, 33, 61, 81
*Elset, elset=__PickedSurf112_S3, internal, instance=Part-8-1
   5,  52, 136, 149, 152, 157, 158, 160, 165
*Elset, elset=__PickedSurf112_S1, internal, instance=Part-6-2
  5,  6, 10, 12, 13, 14, 15, 16, 17, 37, 59, 62, 97
*Elset, elset=__PickedSurf112_S1, internal, instance=Part-7-1, generate
 1,  3,  1
*Elset, elset=__PickedSurf112_S1, internal, instance=Part-5-2
  4,  6,  8, 10, 13, 14, 15, 16, 39, 63
*Elset, elset=__PickedSurf112_S1, internal, instance=Part-10-1
  7, 15, 16, 18, 24, 25, 26, 27, 29, 30, 34, 46
*Elset, elset=__PickedSurf112_S1, internal, instance=Part-8-1
  15,  30,  46,  60,  68,  69, 100
*Elset, elset=__PickedSurf112_S4, internal, instance=Part-6-2
  34,  63,  64,  65, 106, 173, 180
*Elset, elset=__PickedSurf112_S4, internal, instance=Part-5-2
  5, 17, 18, 22, 23, 24
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*Elset, elset=__PickedSurf112_S4, internal, instance=Part-10-1
  8, 15, 65, 68, 69, 75, 77
*Elset, elset=__PickedSurf112_S4, internal, instance=Part-8-1
  22,  28,  38,  44,  45,  52,  56,  72,  77, 142, 145, 162
*Surface, type=ELEMENT, name=_PickedSurf112, internal
__PickedSurf112_S2, S2
__PickedSurf112_S3, S3
__PickedSurf112_S4, S4
__PickedSurf112_S1, S1
*End Assembly
**
** ELEMENT CONTROLS
**
*Section Controls, name=EC-1, hourglass=ENHANCED
1., 1., 1.
*Amplitude, name=cool
             0.,              0.,             20.,              0.
*Amplitude, name=displacment
             0.,             -0.,           0.025, 0.000246900879716674,            0.05, 0.00048770575499286,           0.075, 0.000722565136714471
            0.1, 0.000951625819640405,           0.125, 0.00117503097415405,            0.15, 0.00139292023574942,           0.175, 0.00160542979230793
            0.2, 0.00181269246922018,           0.225, 0.00201483781240623,            0.25, 0.00221199216928595,           0.275, 0.00240427876775032
            0.3, 0.00259181779318282,           0.325, 0.00277472646357928,            0.35, 0.00295311910281287,           0.375, 0.00312710721209028
            0.4, 0.00329679953964361,           0.425, 0.00346230214870153,            0.45, 0.00362371848378227,           0.475, 0.0037811494353498
            0.5, 0.00393469340287367
*Amplitude, name=power
             0., 127712533.860981,           0.005, 104211862581.102,           0.025, 104211862581.102,            0.03,              0.
           0.05,              0.,           0.055,              0.,           0.075,              0.,            0.08,              0.
            0.1,              0.,           0.105,              0.,           0.125,              0.,            0.13,              0.
           0.15,              0.,           0.155,              0.,           0.175,              0.,            0.18,              0.
            0.2,              0.,           0.205,              0.,           0.225,              0.,            0.23,              0.
           0.25,              0.,           0.255,              0.,           0.275,              0.,            0.28,              0.
            0.3,              0.,           0.305,              0.,           0.325,              0.,            0.33,              0.
           0.35,              0.,           0.355,              0.,           0.375,              0.,            0.38,              0.
            0.4,              0.,           0.405,              0.,           0.425,              0.,            0.43,              0.
           0.45,              0.,           0.455,              0.,           0.475,              0.,            0.48, 127712533.860981
            0.5, 127712533.860981
**
** MATERIALS
**
*Material, name=Al2O3
*Conductivity
25.,
*Density
3690.,
*Elastic
 3e+11, 0.21
*Specific Heat
880.,
*Material, name=H13
*Conductivity
 27.2, 20.
 27.8,100.
 28.4,200.
 28.6,300.
 29.2,400.
 29.8,500.
 30.3,600.
*Density
   7760., 20.
 7738.83,100.
 7710.84,200.
 7682.03,300.
 7652.53,400.
 7622.46,500.
 7591.94,600.
*Elastic
 2.07e+11, 0.3
*Specific Heat
560., 20.
582.,100.
593.,200.
598.,300.
601.,400.
608.,500.
618.,600.
** Titanium Sample
*Material, name=material
*Conductivity
  5.91,     20.
  5.91,  168.65
  6.26,  199.78
  7.43,  300.33
   8.6,  400.88
  9.79,  499.04
  9.79,  501.44
 11.03,  599.59
 11.33,  621.14
 11.56,  640.29
 11.83,  659.45
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 42.09, 2397.57
*Density
 4435.12,-270.
 4435.01,-265.
  4434.9,-260.
 4434.79,-255.
 4434.69,-250.
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 4242.71,1660.
*Elastic
  1.0327e+11, 0.343923,      27.
 1.03095e+11, 0.342265,      50.
 1.01869e+11, 0.345166,     100.
 9.90887e+10, 0.347572,     150.
 9.76545e+10, 0.351007,     200.
 9.44234e+10, 0.354369,     250.
 9.14453e+10, 0.357805,     300.
 8.86248e+10,  0.36124,     350.
 8.68905e+10, 0.364602,     400.
 8.30365e+10, 0.368037,     450.
 8.12847e+10, 0.371473,     500.
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 3.02915e+08, 0.485591,    1650.
*Inelastic Heat Fraction
          1.,
*Plastic, rate=0.
 3.88118e+08,  0.,600.
 4.08469e+08, 0.02, 600.
 4.08375e+08, 0.04, 600.
 4.07969e+08, 0.06, 600.
 4.06942e+08, 0.08, 600.
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 5.2673e+06,   4.,1100.
*Plastic, rate=0.01
 4.04542e+08,  0.,600.
 4.614e+08, 0.02, 600.
 4.83557e+08, 0.04, 600.
 4.96393e+08, 0.06, 600.
 5.05544e+08, 0.08, 600.
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 9.7262e+06,   4.,1100.
*Plastic, rate=0.1
 4.21661e+08,  0.,600.
 4.79729e+08, 0.02, 600.
 5.02636e+08, 0.04, 600.
 5.15852e+08, 0.06, 600.
 5.2526e+08, 0.08, 600.
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 1.79269e+07,   4.,1100.
*Plastic, rate=1.
 4.39505e+08,  0.,600.
 4.98753e+08, 0.02, 600.
 5.22429e+08, 0.04, 600.
 5.36032e+08, 0.06, 600.
 5.45699e+08, 0.08, 600.
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 3.30978e+07,   4.,1100.
*Plastic, rate=10.
 4.58103e+08,  0.,600.
 5.18496e+08, 0.02, 600.
 5.4296e+08, 0.04, 600.
 5.56954e+08, 0.06, 600.
 5.66882e+08, 0.08, 600.
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 6.10937e+07,   4.,1100.
*Plastic, rate=100.
 4.77489e+08,  0.,600.
 5.38984e+08, 0.02, 600.
 5.64258e+08, 0.04, 600.
 5.78647e+08, 0.06, 600.
 5.88837e+08, 0.08, 600.
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 8.30023e+07,   4.,1100.
*Plastic, rate=1000.
 4.97695e+08,  0.,600.
 5.60243e+08, 0.02, 600.
 5.86347e+08, 0.04, 600.
 6.01136e+08, 0.06, 600.
 6.11588e+08, 0.08, 600.
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 1.06201e+08,  3.9,1100.
*Specific Heat
    565.,     20.
  597.78,  149.99
    615.,   200.7
    640.,  300.04
  651.11,  400.42
  660.56,  500.79
  697.78,  600.13
  727.22,  620.83
  747.78,  640.49
  727.22,  660.15
  723.33,  680.85
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  798.83, 1526.85
**
** INTERACTION PROPERTIES
**
*Surface Interaction, name=friction
1.,
*Friction, slip tolerance=0.005
 0.5,
*Surface Behavior, pressure-overclosure=TABULAR
    0.,    0.
 1e+09, 1e-06
*Surface Interaction, name=machine_parts_conductance
1.,
*Gap Conductance
10000.,    0.
    0., 0.001
*Surface Interaction, name=sample_platen_conductance
1.,
*Gap Conductance
1500.,    0.
   0., 0.001
*Time Points, name=readout_times
0., 0.025, 0.05, 0.075, 0.1, 0.125, 0.15, 0.175
0.2, 0.225, 0.25, 0.275, 0.3, 0.325, 0.35, 0.375
0.4, 0.425, 0.45, 0.475, 0.5
**
** BOUNDARY CONDITIONS
**
** Name: bottom_machine_encastre Type: Symmetry/Antisymmetry/Encastre
*Boundary
machine_bottom, ENCASTRE
** Name: hold_sample_midline Type: Displacement/Rotation
*Boundary
sample_midline, 1, 1
** Name: top_machine_displacment Type: Displacement/Rotation
*Boundary
machine_top, 1, 1
machine_top, 2, 2
machine_top, 3, 3
machine_top, 4, 4
machine_top, 5, 5
machine_top, 6, 6
**
** PREDEFINED FIELDS
**
** Name: temperature_field   Type: Temperature
*Initial Conditions, type=TEMPERATURE
Set-12, 20.
**
** INTERACTIONS
**
** Interaction: Int-3
*Contact Pair, interaction=friction, type=SURFACE TO SURFACE
_PickedSurf36, Part-4-2.RigidSurface_
** Interaction: Int-4
*Contact Pair, interaction=friction, type=SURFACE TO SURFACE
_PickedSurf38, Part-4-1.RigidSurface_
** Interaction: Int-5
*Contact Pair, interaction=friction, type=SURFACE TO SURFACE
_PickedSurf40, Part-4-2.RigidSurface_
** Interaction: Int-6
*Contact Pair, interaction=friction, type=SURFACE TO SURFACE
_PickedSurf42, Part-4-1.RigidSurface_
** Interaction: Int-11
*Contact Pair, interaction=sample_platen_conductance, type=SURFACE TO SURFACE
_PickedSurf79, _PickedSurf78
** Interaction: Int-12
*Contact Pair, interaction=sample_platen_conductance, type=SURFACE TO SURFACE
_PickedSurf81, _PickedSurf80
** Interaction: Int-13
*Contact Pair, interaction=machine_parts_conductance, type=SURFACE TO SURFACE
_PickedSurf95, _PickedSurf94
** Interaction: Int-14
*Contact Pair, interaction=machine_parts_conductance, type=SURFACE TO SURFACE
_PickedSurf97, _PickedSurf96
** Interaction: Int-15
*Contact Pair, interaction=machine_parts_conductance, type=SURFACE TO SURFACE
_PickedSurf99, _PickedSurf98
** Interaction: Int-16
*Contact Pair, interaction=machine_parts_conductance, type=SURFACE TO SURFACE
_PickedSurf101, _PickedSurf100
** ----------------------------------------------------------------
**
** STEP: deform
**
*Step, name=deform, nlgeom=YES, inc=1000
*Coupled Temperature-displacement, creep=none, deltmx=1000.
0.005, 0.475, 5e-06, 0.005
**
** BOUNDARY CONDITIONS
**
** Name: top_machine_displacment Type: Displacement/Rotation
*Boundary, amplitude=displacment
machine_top, 1, 1
machine_top, 2, 2, -1.
machine_top, 3, 3
machine_top, 4, 4
machine_top, 5, 5
machine_top, 6, 6
**
** LOADS
**
** Name: cool   Type: Surface heat flux
*Dsflux, amplitude=cool
sample_surface, S, 0.00125
** Name: power   Type: Body heat flux
*Dflux, amplitude=power
Volume, BF, 1.
**
** INTERACTIONS
**
** Interaction: air_conductance
*Sfilm
_PickedSurf112, F, 25., 0.
**
** OUTPUT REQUESTS
**
*Restart, write, frequency=0
**
** FIELD OUTPUT: F-Output-2
**
*Output, field, time points=readout_times
*Node Output
CF, NT, RF, RFL, RFLE, U
*Element Output, directions=YES
EEQUT, ER, FLUXS, HBF, HFL, LE, MVF, PE, PEEQ, PEMAG, S, SEQUT, TE, TEEQ, TEVOL
*Contact Output
CDISP, CSTRESS
**
** HISTORY OUTPUT: plastic_dissipation
**
*Output, history, time points=readout_times
*Energy Output
ALLPD,
**
** HISTORY OUTPUT: central_thermocouple_temp
**
*Node Output, nset=central_thermocouple
NT,
**
** HISTORY OUTPUT: off_centre_thermocouple_temp
**
*Node Output, nset=off_centre_thermocouple
NT,
**
** HISTORY OUTPUT: platen_reference_point_ouput
**
*Node Output, nset=platen_reference_point
U2,
**
** HISTORY OUTPUT: sample_midpoint_temp
**
*Node Output, nset=sample_midpoint
NT,
**
** HISTORY OUTPUT: sample_top_forces
**
*Contact Output, nset=sample_top
CFN2,
*End Step
